// SBML level 3 version 1

function Rate_Law_for_reaction_4(bm, k3, D, M)
  bm + k3*D*M;
end

function Rate_Law_for_reaction(bH, k1, D, M)
  bH + k1*D*M;
end

function Rate_Law_for_reaction_6(k5, C, N, alpha)
  k5*C*N + alpha*N;
end

model Jarrah2014___mathematical_model_of_the_immune_response_in_muscle_degeneration_and_subsequent_regeneration_in_Duchenne_muscular_dystrophy_in_mdx_mice()
  // Jarrah2014 - mathematical model of the immune response in muscle degeneration and subsequent regeneration in Duchenne muscular dystrophy in mdx mice
  // biomodels.db:MODEL2107200002 biomodels.db:BIOMD0000001015
  // isDescribedBy pubmed:25013809
  // hasVersion omit:0018341
  // mamo:MAMO_0000046 ncit:C17930
  // occursIn ncit:C33558
  // hasTaxon taxonomy:10090
  // model units - substance: substance, time: time_unit, volume: volume, area: area, length: length, extent: extent

  // Compartments:
  compartment compartment_ = 1 volume; compartment_ is "Skeletal_muscle";  // ncit:C13050

  // Species:
  species H in compartment_ = 0; H is "CD4+_T_Helper_cells_(H)";  // CL:0000492
  species D in compartment_ = 0; D is "Damaged_fibres_(D)";  // BTO:0000888; hasProperty ncit:C61555
  species M in compartment_ = 400; M is "Macrophages_(M)";  // omit:0009339
  species C in compartment_ = 4; C is "CD8+_cytotoxic_T_lymphocytes_(C)";  // CL:0000794
  species N in compartment_ = 100; N is "Normal_fibres_(N)";  // BTO:0000888
  species R in compartment_ = 0; R is "Regenerative_fibres_(R)";  // BTO:0000888; hasProperty ncit:C17083

  // Parameters:
  dH = 1;
  H0 = 0;
  dC = 1.61511;
  C0 = 4;
  dM = 0.781155;
  M0 = 400;
  h = 0.511657;
  time_var = 0;
  sigma = 2.2;
  m = 4.22686;
  k1 = 0.0341;
  k2 = 0.115375;
  k3 = 0.766576;
  k5 = 0.00409948;
  k6 = 0.000323097;
  dD = 1.34671;
  k4 = 0.123848;

  // Assignment rules:
  alpha := h/((time_var + 1e-11)*sigma*(2*pi)^0.5)*exp(-(ln(time_var + 1e-11) - m)^2/(2*sigma^2));
  bM := dM*M0;
  bC := dC*C0;
  bH := dH*H0;

  // Rate rules:
  time_var' = 1;

  // Reactions:
  reaction_: => H; compartment_*Rate_Law_for_reaction(bH, k1, D, M); reaction_ is "T_helper_cells_creation";  // modifiers: D, M; CL:0000492; hasProperty ncit:C42620
  T_helper_cells_degradation: H => ; compartment_*dH*H;  // CL:0000492; hasProperty ncit:C61559
  T_lymphocytes_creation: => C; compartment_*Rate_Law_for_reaction(bC, k2, D, H);  // modifiers: H, D; CL:0000794; hasProperty ncit:C42620
  T_lymphocytes_degradation: C => ; compartment_*dC*C;  // CL:0000794; hasProperty ncit:C61559
  Macrophage_creation: => M; compartment_*Rate_Law_for_reaction_4(bM, k3, D, M);  // modifiers: D; omit:0009339; hasProperty ncit:C42620
  Macrophage_degradation: M => ; compartment_*dM*M;  // omit:0009339; hasProperty ncit:C61559
  Fibre_damage: N => D; compartment_*Rate_Law_for_reaction_6(k5, C, N, alpha);  // modifiers: C; BTO:0000888; hasProperty ncit:C61555
  Fibre_regeneration: D => R; compartment_*Rate_Law_for_reaction_6(k6, M, D, dD);  // modifiers: M; BTO:0000888; hasProperty ncit:C17083
  Fibre_normalisation: R => N; compartment_*k4*R;  // BTO:0000888

  // Unit definitions:
  unit substance_per_volume = mole / litre;
  unit volume = litre;
  unit length = metre;
  unit area = metre^2;
  unit time_unit = 1;
  unit substance = mole;
  unit extent = mole;
end
