// SBML level 3 version 1
// Created with https://github.com/matthiaskoenig/sbmlutils.

model apap_liver_core_9(Vext, Vli, apap_ext, apap, napqi)
  // Model for hepatic APAP metabolism in the liver
  // Minimal model for hepatic metabolism of paracetamol elimination encoded in SBML format.
  // The model consists of of a single liver compartment with single clearance reaction.
  // Terms of use
  // The content of this model has been carefully created in a manual research effort. This file has been created by Matthias König using sbmlutils . For questions contact koenigmx@hu-berlin.de.
  // Copyright © 2021 Matthias König.
  // This work is licensed under a Creative Commons Attribution 4.0 International License.
  // Redistribution and use of any part of this model, with or without modification, are permitted provided that the following conditions are met:
  // Redistributions of this SBML file must retain the above copyright notice, this list of conditions and the following disclaimer.
  // Redistributions in a different form must reproduce the above copyright notice, this list of conditions and the following disclaimer in the documentation and/or other materials provided with the distribution.
  // This model is distributed in the hope that it will be useful, but WITHOUT ANY WARRANTY; without even the implied warranty of MERCHANTABILITY or FITNESS FOR A PARTICULAR PURPOSE.
  // model units - substance: mmole, time: min, volume: litre, area: m2, length: metre, extent: mmole

  // Compartments:
  compartment Vext = 1.5 litre; Vext is "plasma";  // SBO:0000290 ncit:C13356 BTO:0000131
  compartment Vli = 1.5 litre; Vli is "liver";  // SBO:0000290 FMA:7197 BTO:0000759 ncit:C12392
  compartment Vmem = 1 m2; Vmem is "plasma membrane";  // SBO:0000290 ncit:C13735 FMA:63841 GO:0005886

  // Species:
  species apap_ext in Vext = 0; apap_ext is "paracetamol (plasma)";  // SBO:0000247 CHEBI:46195 ncit:C198 inchikey:RZVAJINKPMORJF-UHFFFAOYSA-N
  species apap in Vli = 0; apap is "paracetamol";  // SBO:0000247 CHEBI:46195 ncit:C198 inchikey:RZVAJINKPMORJF-UHFFFAOYSA-N
  species napqi in Vli = 0; napqi is "NAPQI";  // SBO:0000247 CHEBI:29132 inchikey:URNSECGXFRDEDC-UHFFFAOYSA-N
  substanceOnly species CYP2E1 in Vli = 1; CYP2E1 is "Relative Cytochrome P450 2E1 (zonation)";  // substance in dimensionless; conversionFactor cf_species_dimensionless; SBO:0000245 uniprot:Q05421; isVersionOf uniprot:P05182 uniprot:P05181

  // Parameters:
  cf_species_dimensionless = 1 per_mmole; cf_species_dimensionless is "conversion factor for dimensionless species";  // SBO:0000002
  necrosis_threshold = 1 mM; necrosis_threshold is "NAPQI threshold for necrosis to occur [mM]";
  necrosis has dimensionless; necrosis is "necrosis state [0 (alive), 1 (death)]";
  Mr_apap = 151.16 g_per_mole; Mr_apap is "molecular weight apap [g/mole]";  // SBO:0000647
  Mr_napqi = 149.15 g_per_mole; Mr_napqi is "molecular weight napqi [g/mole]";  // SBO:0000647
  d_apap_ext__dt has mmole_per_min; d_apap_ext__dt is "rate of APAP change";
  APAPIM_Vmax = 1 mmole_per_min_l; APAPIM_Vmax is "Vmax apap import";  // SBO:0000186
  APAPIM_Km_apap = 0.5 mM; APAPIM_Km_apap is "Km apap import";  // SBO:0000027
  d_vapap_ext__d_apap_ext has l_per_min;
  APAPD_Vmax = 0.05 mmole_per_min_l; APAPD_Vmax is "Vmax apap clearance";
  APAPD_Km_apap = 0.5 mM; APAPD_Km_apap is "Km apap clearance";
  NAPQIDETOX_Vmax = 0.005 mmole_per_min_l; NAPQIDETOX_Vmax is "Vmax napqi detoxification";
  NAPQIDETOX_Km_napqi = 0.5 mM; NAPQIDETOX_Km_napqi is "Km napqi detoxifictation";

  // Assignment rules:
  necrosis := piecewise(1, napqi > necrosis_threshold, 0);
  d_apap_ext__dt := -APAPIM;
  d_vapap_ext__d_apap_ext := (1 - necrosis)*APAPIM_Vmax/APAPIM_Km_apap*Vli/(1 + apap_ext/APAPIM_Km_apap + apap/APAPIM_Km_apap);

  // Reactions:
  APAPIM: apap_ext -> apap; (1 - necrosis)*APAPIM_Vmax/APAPIM_Km_apap*Vli*(apap_ext - apap)/(1 + apap_ext/APAPIM_Km_apap + apap/APAPIM_Km_apap); APAPIM is "Paracetamol import (APAPIM)";  // SBO:0000655
  APAPD: apap => napqi; (1 - necrosis)*CYP2E1*APAPD_Vmax*Vli*(apap/(apap + APAPD_Km_apap)); APAPD is "Paracetamol clearance (APAPD)";  // modifiers: CYP2E1; SBO:0000176
  NAPQIDETOX: napqi => ; (1 - necrosis)*NAPQIDETOX_Vmax*Vli*(napqi/(napqi + NAPQIDETOX_Km_napqi)); NAPQIDETOX is "NAPQI detoxification (NAPQIDETOX)";  // SBO:0000176

  // Unit definitions:
  unit g_per_mole = gram / mole; g_per_mole is "g/mole";
  unit l_per_min = litre / (60 second); l_per_min is "l/min";
  unit m2 = metre^2; m2 is "meter^2";
  unit mM = 1e-3 mole / litre; mM is "mmole/liter";
  unit mg_per_s_l = 1e-3 gram / (second * litre); mg_per_s_l is "mg/s/l";
  unit min = 60 second;
  unit min_per_hr = 60 second / (3600 second); min_per_hr is "min/hour";
  unit ml = 1e-3 litre;
  unit mmole = 1e-3 mole;
  unit mmole_per_min = 1e-3 mole / (60 second); mmole_per_min is "mmole/min";
  unit mmole_per_min_l = 1e-3 mole / (60 second * litre); mmole_per_min_l is "mmole/min/l";
  unit mumole = 1e-6 mole; mumole is "µmole";
  unit per_min = 1 / (60 second); per_min is "1/min";
  unit per_mmole = 1 / (1e-3 mole); per_mmole is "1/mmole";
end
